*HEADING
ABAQUS input deck
**         Nodes
*NODE, NSET=NALL
1, 6.748999023E+01, 6.439013671E+01, 1.535986328E+01
2, 2.674899902E+02, 6.439013671E+01, 1.535986328E+01
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**         Elements
*ELEMENT, TYPE=C3D8, ELSET=Unknown-Region00-0
1, 1, 2, 22, 21, 481, 482, 502, 501
2, 2, 3, 23, 22, 482, 483, 503, 502
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**         Element sets
**         Element properties
*SOLID SECTION, ELSET=Unknown-Region00-0, MATERIAL=MID1
**         Material properties
*MATERIAL, NAME=MID1
*ELASTIC, TYPE=ISOTROPIC
1.0E+7, .3,
